OpenVSP model (file version 5), 29 components.
Geometry view with OpenVSP parameter names; values to 6 digits, angles in degrees, lengths in the model's unit.
Overall bounding box: X_Min=0 X_Len=6.06374 Y_Min=-5.06116 Y_Len=10.1223 Z_Min=-0.879859 Z_Len=2.603

Fuselage "Fuselage OML"
  location (X Y Z) 0 0 0, rotation 0 0 0
  bounding box size 6.06374 0.95 1.00258
  Design: Length=6
  cross sections:
    n  XLocPercent  YLocPercent  ZLocPercent  shape
    0  0            0            0            circle Circle_Diameter=0
    1  0.2          0            0            circle Circle_Diameter=0.95
    2  0.566667     0            0            as above
    3  1            0            0.0666667    circle Circle_Diameter=0.15
  SS_Rectangle "FSD Bay Doors": Center_U=0.377451 Center_W=0.25 U_Length=0.235 W_Length=0.151961

BodyOfRevolution "Fwd Bulkhead", child of "Fuselage OML"
  location (X Y Z) 1.2 0 0, rotation 0 0 0
  bounding box size 0.0208 0.925 0.925
  Design: A0=0 Ae=0 Amin=0 AminW=0 Angle=0 Diameter=0 Mode=2
  profile: edit curve Width=0.0208 Height=0.925 AbsoluteFlag=0 SymType=0 linear points (X Y): 0.5 0, 0.5 -0.5, 0 -0.5, -0.5 -0.5, -0.5 0, -0.5 0.5, 0 0.5, 0.5 0.5, 0.5 0

BodyOfRevolution "Aft Bulkhead", child of "Fuselage OML"
  location (X Y Z) 3.375 0 0, rotation 0 0 0
  bounding box size 0.0208 0.925 0.925
  Design: A0=0 Ae=0 Amin=0 AminW=0 Angle=0 Diameter=0 Mode=2
  profile: edit curve Width=0.0208 Height=0.925 AbsoluteFlag=0 SymType=0 linear points (X Y): 0.5 0, 0.5 -0.5, 0 -0.5, -0.5 -0.5, -0.5 0, -0.5 0.5, 0 0.5, 0.5 0.5, 0.5 0

Conformal "Fuselage IML", child of "Fuselage OML"
  location (X Y Z) 0 0 0, rotation 0 0 0
  bounding box size 6.04122 0.9334 0.989584
  Design: ChordTrimFlag=0 ChordTrimMax=0.9 ChordTrimMin=0.1 EtaTrimMax=0.9 EtaTrimMin=0.1 L01Max=1 L01Min=1 L0LenTrimMax=6.08002 L0LenTrimMin=0.299698 LTrimMax=0.998231 LTrimMin=0.049205 OffSetEnds=1 Offset=0.0083 Side1Trim=0.1 Side1TrimFlag=0 Side2Trim=0.1 Side2TrimFlag=0 Side3Trim=0.1 Side3TrimFlag=0 Side4Trim=0.1 Side4TrimFlag=0 UMaxTrimTypeFalg=0 UMinTrimTypeFalg=0 UTrimFlag=0 UTrimMax=0.9 UTrimMin=0.1 V1TrimBegin=0.9 V1TrimEnd=0.1 V1TrimFlag=0 V2TrimBegin=0.4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

Wing "Main Wing", child of "Fuselage OML"
  location (X Y Z) 1.95 0 0.524, rotation 0 2 0
  symmetric about XZ
  bounding box size 1.25048 10.1223 0.190562
  totals: TotalSpan=10 TotalProjectedSpan=10 TotalChord=1.03125 TotalArea=10.3125 TotalAR=9.69697
  root: chord 1.25, twist 0, NACA 4-series Camber=0.05 CamberLoc=0.3 ThickChord=0.15
  sections:
    n  Span  Root_Chord  Tip_Chord  Area     Sweep  Sweep_Location  Dihedral  Twist  Twist_Location  tip airfoil
    1  5     1.25        0.8125     5.15625  2      0               0         0      0.25            as above
  SS_Control "Flap": UStart=0.367647 UEnd=0.495098 Length_C_Start=0.25 Length_C_End=0.25 Length_Start=0.301241 Length_End=0.259421 LE_Flag=0 Surf_Type=2
  SS_Control "Aileron": UStart=0.495098 UEnd=0.671569 Length_C_Start=0.25 Length_C_End=0.25 Length_Start=0.259421 Length_End=0.203125 LE_Flag=0 Surf_Type=2

Wing "Wing Pylon", child of "Main Wing"
  location (X Y Z) 2.025 0 0.464, rotation 90 0 0; relative location 0.075 0 -0.06, rotation 90 0 0
  bounding box size 1.125 0.225088 0.03
  totals: TotalSpan=0.03 TotalProjectedSpan=0.03 TotalChord=1.125 TotalArea=0.03375 TotalAR=0.0266667
  root: chord 1.125, twist 0, NACA 4-series Camber=0 CamberLoc=0.2 ThickChord=0.2
  sections:
    n  Span  Root_Chord  Tip_Chord  Area     Sweep  Sweep_Location  Dihedral  Twist  Twist_Location  tip airfoil
    1  0.03  1.125       1.125      0.03375  0      0               0         0      0.25            as above

Wing "V-Stab", child of "Fuselage OML"
  location (X Y Z) 5 0 0.45, rotation 90 0 0
  bounding box size 1.00503 0.150065 1.27314
  totals: TotalSpan=1.25 TotalProjectedSpan=1.25 TotalChord=0.75 TotalArea=0.9375 TotalAR=1.66667
  root: chord 1, twist 0, NACA 4-series Camber=0 CamberLoc=0.2 ThickChord=0.15
  sections:
    n  Span  Root_Chord  Tip_Chord  Area    Sweep  Sweep_Location  Dihedral  Twist  Twist_Location  tip airfoil
    1  1.25  1           0.5        0.9375  22     0               0         0      0.25            NACA 4-series Camber=0 CamberLoc=0.2 ThickChord=0.1
  SS_Control "Rudder": UStart=0.352941 UEnd=0.666667 Length_C_Start=0.25 Length_C_End=0.25 Length_Start=0.242647 Length_End=0.125 LE_Flag=0 Surf_Type=2

Wing "H-Stab", child of "Fuselage OML"
  location (X Y Z) 5.35 0 0.475, rotation 0 0 0
  symmetric about XZ
  bounding box size 0.65 4.0645 0.0975422
  totals: TotalSpan=4 TotalProjectedSpan=4 TotalChord=0.65 TotalArea=2.6 TotalAR=6.15385
  root: chord 0.65, twist 0, NACA 4-series Camber=0 CamberLoc=0.2 ThickChord=0.15
  sections:
    n  Span  Root_Chord  Tip_Chord  Area  Sweep  Sweep_Location  Dihedral  Twist  Twist_Location  tip airfoil
    1  2     0.65        0.65       1.3   0      0               0         0      0.25            NACA 4-series Camber=0 CamberLoc=0.2 ThickChord=0.1
  SS_Control "Elevator": UStart=0.382353 UEnd=0.754902 Length_C_Start=0.25 Length_C_End=0.25 Length_Start=0.1625 Length_End=0.1625 LE_Flag=0 Surf_Type=2

Blank "Propulsion System"
  location (X Y Z) 0 0 0, rotation 0 0 0

Fuselage "EDF", child of "Propulsion System"
  location (X Y Z) 3.3 0.75 0, rotation 0 0 0
  symmetric about XZ
  bounding box size 0.8 1.9 0.4
  Design: Length=0.8
  cross sections:
    n  XLocPercent  YLocPercent  ZLocPercent  shape
    0  0            0            0            circle Circle_Diameter=0.4
    1  1            0            0            as above

Wing "EDF Pylon", child of "Propulsion System"
  location (X Y Z) 3.45 0 0, rotation 0 0 0
  symmetric about XZ
  bounding box size 0.5 1.15 0.0750325
  totals: TotalSpan=1.15 TotalProjectedSpan=1.15 TotalChord=0.5 TotalArea=0.575 TotalAR=2.3
  root: chord 0.5, twist 0, NACA 4-series Camber=0 CamberLoc=0.2 ThickChord=0.15
  sections:
    n  Span   Root_Chord  Tip_Chord  Area    Sweep  Sweep_Location  Dihedral  Twist  Twist_Location  tip airfoil
    1  0.575  0.5         0.5        0.2875  0      0               0         0      0.25            as above

Custom "Propulsion Battery", child of "Propulsion System"
  location (X Y Z) 0.25 0 0, rotation 0 0 0
  bounding box size 0.51 0.33 0.33
  Design: BoxLayout=0 GapCol=0.001 GapRow=0.001 Height=0.33 LayoutTrigger=0 Length=0.51 NumCol=1 NumRow=1 SquareFlag=0 Width=0.33
  custom script BoxGroup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

Custom "ESC", child of "Propulsion System"
  location (X Y Z) 3.6 0 0.1, rotation 0 0 0
  bounding box size 0.167 0.25 0.083
  Design: Height=0.083 Length=0.167 SquareFlag=0 Width=0.25
  custom script Box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

Blank "Landing Gear"
  location (X Y Z) 0 0 0, rotation 0 0 0

Fuselage "NG Strut", child of "Landing Gear"
  location (X Y Z) 1.125 0 -0.22, rotation 0 90 0
  bounding box size 0.05 0.05 0.425
  Design: Length=0.425
  cross sections:
    n  XLocPercent  YLocPercent  ZLocPercent  shape
    0  0            0            0            circle Circle_Diameter=0.05
    1  1            0            0            as above

BodyOfRevolution "NG Wheel", child of "NG Strut"
  location (X Y Z) 1.125 -0.04 -0.77, rotation 0 0 90; relative location 0 -0.04 -0.55, rotation 0 0 90
  bounding box size 0.20833 0.08333 0.20833
  Design: A0=0.0122718 Ae=0.0122718 Amin=0.00136376 AminW=0.25 Angle=0 Diameter=0.125 Mode=0
  profile: circle Circle_Diameter=0.08333

Wing "MG Strut", child of "Landing Gear"
  location (X Y Z) 3.4 0 -0.25, rotation 0 0 0
  symmetric about XZ
  bounding box size 0.125 1.32165 0.451763
  totals: TotalSpan=1.8 TotalProjectedSpan=1.3 TotalChord=0.125 TotalArea=0.225 TotalAR=7.51111
  root: chord 0.125, twist 0, edit curve Width=0.125 Height=0.025 AbsoluteFlag=0 SymType=1 linear points (X Y): 0.5 0, 0.5 -0.5, 0 -0.5, -0.5 -0.5, -0.5 0, -0.5 0.5, 0 0.5, 0.5 0.5, 0.5 0
  sections:
    n  Span  Root_Chord  Tip_Chord  Area    Sweep  Sweep_Location  Dihedral  Twist  Twist_Location  tip airfoil
    1  0.4   0.125       0.125      0.05    0      0               0         0      0.25            edit curve Width=0.125 Height=0.025 AbsoluteFlag=0 SymType=0 linear points (X Y): 0.5 0, 0.5 -0.5, 0 -0.5, -0.5 -0.5, -0.5 0, -0.5 0.5, 0 0.5, 0.5 0.5, 0.5 0
    2  0.5   0.125       0.125      0.0625  0      0               -60       0      0.25            as above

BodyOfRevolution "MG Wheel", child of "MG Strut"
  location (X Y Z) 3.465 0.65 -0.715, rotation 3 0 90; relative location 0.065 0.65 -0.465, rotation 3 0 90
  symmetric about XZ
  bounding box size 0.333333 1.48073 0.33408
  Design: A0=0.0490874 Ae=0.0490874 Amin=0.0218167 AminW=0.25 Angle=0 Diameter=0.25 Mode=0
  profile: circle Circle_Diameter=0.083333

Blank "Avionics and FCS"
  location (X Y Z) 0 0 0, rotation 0 0 0

Custom "Autopilot", child of "Avionics and FCS"
  location (X Y Z) 2.35 0 0.55, rotation 0 0 0
  bounding box size 0.312 0.148 0.105
  Design: Height=0.105 Length=0.312 SquareFlag=0 Width=0.148
  custom script Box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

Fuselage "GPS", child of "Avionics and FCS"
  location (X Y Z) 3.7 0 0.515, rotation 0 90 0
  bounding box size 0.25 0.25 0.05
  Design: Length=0.05
  cross sections:
    n  XLocPercent  YLocPercent  ZLocPercent  shape
    0  0            0            0            point
    1  1            0            0            circle Circle_Diameter=0.25

Blank "Mission Systems"
  location (X Y Z) 0 0 0, rotation 0 0 0

Custom "Camera", child of "Mission Systems"
  location (X Y Z) 0.75 0 -0.275, rotation 0 0 0
  bounding box size 0.25 0.25 0.25
  Design: Height=0.25 Length=0.25 SquareFlag=0 Width=0.25
  custom script Box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

Custom "Mesh Comms Box", child of "Mission Systems"
  location (X Y Z) 1.025 0 0.275, rotation 0 0 0
  bounding box size 0.167 0.333 0.167
  Design: Height=0.167 Length=0.167 SquareFlag=0 Width=0.333
  custom script Box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

Blank "Rotary Launcher", child of "Mission Systems"
  location (X Y Z) 0 0 0, rotation 0 0 0

Fuselage "Launcher Shaft", child of "Rotary Launcher"
  location (X Y Z) 1.2 0 0, rotation 0 0 0
  bounding box size 2.2 0.165 0.165
  Design: Length=2.2
  cross sections:
    n  XLocPercent  YLocPercent  ZLocPercent  shape
    0  0            0            0            circle Circle_Diameter=0.165
    1  1            0            0            as above

Custom "Launcher Servo", child of "Rotary Launcher"
  location (X Y Z) 1.075 0 0, rotation 0 0 0
  bounding box size 0.125 0.125 0.125
  Design: Height=0.125 Length=0.125 SquareFlag=0 Width=0.125
  custom script Box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

Fuselage "FSD Pair 1", child of "Rotary Launcher"
  location (X Y Z) 1.305 0.271 0, rotation 0 0 0
  symmetric about XZ
  bounding box size 2 0.917 0.375
  Design: Length=2
  cross sections:
    n  XLocPercent  YLocPercent  ZLocPercent  shape
    0  0            0            0            point
    1  0.25         0            0            circle Circle_Diameter=0.375
    2  1            0            0            as above

Fuselage "FSD Pair 2", child of "Rotary Launcher"
  location (X Y Z) 1.305 0 0.271, rotation 0 0 0
  symmetric about XY
  bounding box size 2 0.375 0.917
  Design: Length=2
  cross sections:
    n  XLocPercent  YLocPercent  ZLocPercent  shape
    0  0            0            0            point
    1  0.25         0            0            circle Circle_Diameter=0.375
    2  1            0            0            as above

VSPAERO settings: Sref=14 bref=11.2 cref=1.25 Xcg=2.04659 Ycg=-6.74522e-08 Zcg=0.194416 AlphaStart=0 AlphaEnd=25 AlphaNpts=5 BetaStart=0 BetaEnd=0 BetaNpts=1 MachStart=0.05 MachEnd=0 MachNpts=1 ReCref=1e+07 Vinf=100 Rho=0.002377
